G := g
g := 0.001*kg
m2 := m^2
mm2 := mm^2
cm2 := cm^2
Nm := N*m
mm3 := mm^3
cm3 := cm^3
m3 := m^3
# rozstaw nog
RR := 1173 mm
# ramie
R := RR/2 = 586.5 mm
ro_fil := 1.240701201*g/cm3
r
ro_fil = 1240.7 kg/m3
# OBICAZENIA
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# filament
V_c.nogi := (2*12 + 2*(15 + 12 + 6.5) + 15 + 10 + 10)*cm3 = 126 cm3  # cala noga
V_4seg := 1500*mm3 = 1.5 cm3  # tylko 4 segment
V_nogi := V_c.nogi - V_4seg = 124500 mm3
V_korpusu := 131500*mm3
V_fil := 4*V_nogi + V_korpusu = 629500 mm3
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g_fil := V_fil*ro_fil = 0.781021 kg
k := 1  # wsp wypelnienia przestrzeni pustych
g_fil := g_fil*k = 781.021 gravitational_acceleration
# ciezar serwa SG90
g_sg90 := 9*g
# ciezar calkowity:
g_c := 4*(4*g_sg90) + g_fil = 925.021 gravitational_acceleration
g_1servo := g_c/3 = 308.34 gravitational_acceleration  # na 3 bo jak podniesie jedna noge to 3
# Momenty:
R_1 := 845.16 mm/2 = 0.42258 m
T_max := g_1servo*G*R
T_1 := g_1servo*G*R_1
T_max = 1.77345 N*m
T_1 = 1.27779 N*m
T := 0.3*kg*G*10*cm = 0.2942 Nm
# udzwig serwa
T_sg90 := 1.8 kg*G*1*cm = 0.17652 Nm
# udzwig serwa
T_sg90 := 30 kg*G*1*cm = 2.94199 Nm
